/COM, VAJRA Level A wall panel thermal cross-check
/COM, Generated by VAJRA. This macro has not been run by the coding agent.
/COM, Review the installed ANSYS release and confirm SOLID278 is available.
/COM, All geometry and thermal properties use SI units.
/CLEAR,START
/PREP7
ET,1,SOLID278
! Material 1: stone_masonry
MP,KXX,1,2.2
MP,DENS,1,2500
MP,C,1,850
! One square metre wall panel. X is outside-to-inside thickness; Y and Z are 1 m.
BLOCK,0,0.3,0,1,0,1
VSEL,S,VOLU,,1
VATT,1,,1
VSEL,ALL
! VGLUE not needed: single wall volume
ESIZE,0.025
VMESH,ALL
ALLSEL,ALL

! Read time, outside air, inside air, h_out and h_in from tab-delimited file.
*DIM,TAMB,TABLE,4885,1,1,TIME
*DIM,TIND,TABLE,4885,1,1,TIME
*TREAD,TAMB,boundary_conditions_table,txt,,1
*TREAD,TIND,boundary_conditions_table_inside,txt,,1

! The exporter writes two helper files with the scalar tables.
NSEL,S,LOC,X,0
SF,ALL,CONV,9,%TAMB%
NSEL,S,LOC,X,0.3
SF,ALL,CONV,7.6923077,%TIND%
NSEL,S,LOC,X,0.3
NSEL,R,LOC,Y,0.5
NSEL,R,LOC,Z,0.5
*GET,INNER_NODE,NODE,0,NUM,MIN
ALLSEL,ALL
IC,ALL,TEMP,-16.70958333
FINISH
/SOLU
ANTYPE,TRANS
TIMINT,ON
AUTOTS,ON
KBC,1
DELTIM,600,60,1800
TIME,1465200
OUTRES,ALL,ALL
SOLVE
FINISH

/POST26
NUMVAR,20
NSOL,2,INNER_NODE,TEMP,,INNER_T
STORE,MERGE
*GET,NSETS,VARI,,NSETS
*DIM,VTIME,ARRAY,NSETS
*DIM,VTEMP,ARRAY,NSETS
VGET,VTIME(1),1
VGET,VTEMP(1),2
/COM, Export time and inner surface temperature.
*CFOPEN,ansys_wall_results,csv
*VWRITE,'time_s','inner_surface_c'
(A8,',',A18)
*DO,II,1,NSETS
*VWRITE,VTIME(II),VTEMP(II)
(F16.3,',',F16.6)
*ENDDO
*CFCLOSE
FINISH
